** CalculiX input file generato da SectionCHECK
** Elemento: Plinto_con_Pilastro
** Nodi: 2482  Elementi: 1711
**
*NODE, NSET=NALL
1, 0.00000000e+00, 0.00000000e+00, 0.00000000e+00
2, 4.00000000e-01, 0.00000000e+00, 0.00000000e+00
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*ELEMENT, TYPE=C3D8, ELSET=EALL_HEX
1, 1, 2, 8, 7, 37, 38, 44, 43
2, 2, 3, 9, 8, 38, 39, 45, 44
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*ELEMENT, TYPE=T3D2, ELSET=EALL_TRUSS
1376, 2089, 2090
1377, 2090, 2091
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*NSET, NSET=N_OBJ_179_CARPENTERIA
1, 2, 3, 4, 5, 6
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*ELSET, ELSET=E_OBJ_179_CARPENTERIA
1, 2, 3, 4, 5, 6
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*NSET, NSET=N_OBJ_180_CARPENTERIA
109, 110, 111, 112, 113, 114
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*ELSET, ELSET=E_OBJ_180_CARPENTERIA
51, 52, 53, 54, 55, 56
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*NSET, NSET=N_OBJ_191_CARPENTERIA
253, 254, 255, 256, 257, 258
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*ELSET, ELSET=E_OBJ_191_CARPENTERIA
126, 127, 128, 129, 130, 131
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*NSET, NSET=N_OBJ_222_BARRA
2089, 2090, 2091, 2092, 2093, 2094, 2095, 2096, 2097, 2098, 2099, 2100, 2101
*ELSET, ELSET=E_OBJ_222_BARRA
1376, 1377, 1378, 1379, 1380, 1381, 1382, 1383, 1384, 1385, 1386, 1387
*NSET, NSET=N_OBJ_223_BARRA
2102, 2103, 2104, 2105, 2106, 2107, 2108, 2109, 2110, 2111, 2112, 2113, 2114
*ELSET, ELSET=E_OBJ_223_BARRA
1388, 1389, 1390, 1391, 1392, 1393, 1394, 1395, 1396, 1397, 1398, 1399
*NSET, NSET=N_OBJ_224_BARRA
2115, 2116, 2117, 2118, 2119, 2120, 2121, 2122, 2123, 2124, 2125, 2126, 2127
*ELSET, ELSET=E_OBJ_224_BARRA
1400, 1401, 1402, 1403, 1404, 1405, 1406, 1407, 1408, 1409, 1410, 1411
*NSET, NSET=N_OBJ_225_BARRA
2128, 2129, 2130, 2131, 2132, 2133, 2134, 2135, 2136, 2137, 2138, 2139, 2140
*ELSET, ELSET=E_OBJ_225_BARRA
1412, 1413, 1414, 1415, 1416, 1417, 1418, 1419, 1420, 1421, 1422, 1423
*NSET, NSET=N_OBJ_226_BARRA
2141, 2142, 2143, 2144, 2145, 2146, 2147, 2148, 2149, 2150, 2151, 2152, 2153
*ELSET, ELSET=E_OBJ_226_BARRA
1424, 1425, 1426, 1427, 1428, 1429, 1430, 1431, 1432, 1433, 1434, 1435
*NSET, NSET=N_OBJ_227_BARRA
2154, 2155, 2156, 2157, 2158, 2159, 2160, 2161, 2162, 2163, 2164, 2165, 2166
*ELSET, ELSET=E_OBJ_227_BARRA
1436, 1437, 1438, 1439, 1440, 1441, 1442, 1443, 1444, 1445, 1446, 1447
*NSET, NSET=N_OBJ_228_BARRA
2167, 2168, 2169, 2170, 2171, 2172, 2173, 2174, 2175, 2176, 2177, 2178, 2179
*ELSET, ELSET=E_OBJ_228_BARRA
1448, 1449, 1450, 1451, 1452, 1453, 1454, 1455, 1456, 1457, 1458, 1459
*NSET, NSET=N_OBJ_229_BARRA
2180, 2181, 2182, 2183, 2184, 2185, 2186, 2187, 2188, 2189, 2190, 2191, 2192
*ELSET, ELSET=E_OBJ_229_BARRA
1460, 1461, 1462, 1463, 1464, 1465, 1466, 1467, 1468, 1469, 1470, 1471
*NSET, NSET=N_OBJ_230_BARRA
2193, 2194, 2195, 2196, 2197, 2198, 2199
*ELSET, ELSET=E_OBJ_230_BARRA
1472, 1473, 1474, 1475, 1476, 1477
*NSET, NSET=N_OBJ_231_BARRA
2200, 2201, 2202, 2203, 2204, 2205, 2206
*ELSET, ELSET=E_OBJ_231_BARRA
1478, 1479, 1480, 1481, 1482, 1483
*NSET, NSET=N_OBJ_232_BARRA
2207, 2208, 2209, 2210, 2211, 2212, 2213
*ELSET, ELSET=E_OBJ_232_BARRA
1484, 1485, 1486, 1487, 1488, 1489
*NSET, NSET=N_OBJ_233_BARRA
2214, 2215, 2216, 2217, 2218, 2219, 2220
*ELSET, ELSET=E_OBJ_233_BARRA
1490, 1491, 1492, 1493, 1494, 1495
*NSET, NSET=N_OBJ_234_BARRA
2221, 2222, 2223, 2224, 2225, 2226, 2227
*ELSET, ELSET=E_OBJ_234_BARRA
1496, 1497, 1498, 1499, 1500, 1501
*NSET, NSET=N_OBJ_235_BARRA
2228, 2229, 2230, 2231, 2232, 2233, 2234
*ELSET, ELSET=E_OBJ_235_BARRA
1502, 1503, 1504, 1505, 1506, 1507
*NSET, NSET=N_OBJ_236_BARRA
2235, 2236, 2237, 2238, 2239, 2240, 2241
*ELSET, ELSET=E_OBJ_236_BARRA
1508, 1509, 1510, 1511, 1512, 1513
*NSET, NSET=N_OBJ_237_BARRA
2242, 2243, 2244, 2245, 2246, 2247, 2248
*ELSET, ELSET=E_OBJ_237_BARRA
1514, 1515, 1516, 1517, 1518, 1519
*NSET, NSET=N_OBJ_238_BARRA
2249, 2250, 2251, 2252, 2253, 2254, 2255
*ELSET, ELSET=E_OBJ_238_BARRA
1520, 1521, 1522, 1523, 1524, 1525
*NSET, NSET=N_OBJ_239_BARRA
2256, 2257, 2258, 2259, 2260, 2261, 2262
*ELSET, ELSET=E_OBJ_239_BARRA
1526, 1527, 1528, 1529, 1530, 1531
*NSET, NSET=N_OBJ_240_BARRA
2263, 2264, 2265, 2266, 2267, 2268, 2269
*ELSET, ELSET=E_OBJ_240_BARRA
1532, 1533, 1534, 1535, 1536, 1537
*NSET, NSET=N_OBJ_241_BARRA
2270, 2271, 2272, 2273, 2274, 2275, 2276
*ELSET, ELSET=E_OBJ_241_BARRA
1538, 1539, 1540, 1541, 1542, 1543
*NSET, NSET=N_OBJ_242_BARRA
2277, 2278, 2279, 2280, 2281, 2282, 2283
*ELSET, ELSET=E_OBJ_242_BARRA
1544, 1545, 1546, 1547, 1548, 1549
*NSET, NSET=N_OBJ_243_BARRA
2284, 2285, 2286, 2287, 2288, 2289, 2290
*ELSET, ELSET=E_OBJ_243_BARRA
1550, 1551, 1552, 1553, 1554, 1555
*NSET, NSET=N_OBJ_244_BARRA
2291, 2292, 2293, 2294, 2295, 2296, 2297
*ELSET, ELSET=E_OBJ_244_BARRA
1556, 1557, 1558, 1559, 1560, 1561
*NSET, NSET=N_OBJ_245_BARRA
2298, 2299, 2300, 2301, 2302, 2303, 2304
*ELSET, ELSET=E_OBJ_245_BARRA
1562, 1563, 1564, 1565, 1566, 1567
*NSET, NSET=N_OBJ_246_BARRA
2305, 2306, 2307, 2308, 2309, 2310, 2311
*ELSET, ELSET=E_OBJ_246_BARRA
1568, 1569, 1570, 1571, 1572, 1573
*NSET, NSET=N_OBJ_247_BARRA
2312, 2313, 2314, 2315, 2316, 2317, 2318
*ELSET, ELSET=E_OBJ_247_BARRA
1574, 1575, 1576, 1577, 1578, 1579
*NSET, NSET=N_OBJ_248_BARRA
2319, 2320, 2321, 2322, 2323, 2324, 2325
*ELSET, ELSET=E_OBJ_248_BARRA
1580, 1581, 1582, 1583, 1584, 1585
*NSET, NSET=N_OBJ_249_BARRA
2326, 2327, 2328, 2329, 2330, 2331, 2332
*ELSET, ELSET=E_OBJ_249_BARRA
1586, 1587, 1588, 1589, 1590, 1591
*NSET, NSET=N_OBJ_192_STAFFA
2333, 2334, 2335, 2336, 2337
*ELSET, ELSET=E_OBJ_192_STAFFA
1592, 1593, 1594, 1595
*NSET, NSET=N_OBJ_193_STAFFA
2338, 2339, 2340, 2341, 2342
*ELSET, ELSET=E_OBJ_193_STAFFA
1596, 1597, 1598, 1599
*NSET, NSET=N_OBJ_194_STAFFA
2343, 2344, 2345, 2346, 2347
*ELSET, ELSET=E_OBJ_194_STAFFA
1600, 1601, 1602, 1603
*NSET, NSET=N_OBJ_195_STAFFA
2348, 2349, 2350, 2351, 2352
*ELSET, ELSET=E_OBJ_195_STAFFA
1604, 1605, 1606, 1607
*NSET, NSET=N_OBJ_196_STAFFA
2353, 2354, 2355, 2356, 2357
*ELSET, ELSET=E_OBJ_196_STAFFA
1608, 1609, 1610, 1611
*NSET, NSET=N_OBJ_197_STAFFA
2358, 2359, 2360, 2361, 2362
*ELSET, ELSET=E_OBJ_197_STAFFA
1612, 1613, 1614, 1615
*NSET, NSET=N_OBJ_198_STAFFA
2363, 2364, 2365, 2366, 2367
*ELSET, ELSET=E_OBJ_198_STAFFA
1616, 1617, 1618, 1619
*NSET, NSET=N_OBJ_199_STAFFA
2368, 2369, 2370, 2371, 2372
*ELSET, ELSET=E_OBJ_199_STAFFA
1620, 1621, 1622, 1623
*NSET, NSET=N_OBJ_200_STAFFA
2373, 2374, 2375, 2376, 2377
*ELSET, ELSET=E_OBJ_200_STAFFA
1624, 1625, 1626, 1627
*NSET, NSET=N_OBJ_201_STAFFA
2378, 2379, 2380, 2381, 2382
*ELSET, ELSET=E_OBJ_201_STAFFA
1628, 1629, 1630, 1631
*NSET, NSET=N_OBJ_202_STAFFA
2383, 2384, 2385, 2386, 2387
*ELSET, ELSET=E_OBJ_202_STAFFA
1632, 1633, 1634, 1635
*NSET, NSET=N_OBJ_203_STAFFA
2388, 2389, 2390, 2391, 2392
*ELSET, ELSET=E_OBJ_203_STAFFA
1636, 1637, 1638, 1639
*NSET, NSET=N_OBJ_204_STAFFA
2393, 2394, 2395, 2396, 2397
*ELSET, ELSET=E_OBJ_204_STAFFA
1640, 1641, 1642, 1643
*NSET, NSET=N_OBJ_205_STAFFA
2398, 2399, 2400, 2401, 2402
*ELSET, ELSET=E_OBJ_205_STAFFA
1644, 1645, 1646, 1647
*NSET, NSET=N_OBJ_206_STAFFA
2403, 2404, 2405, 2406, 2407
*ELSET, ELSET=E_OBJ_206_STAFFA
1648, 1649, 1650, 1651
*NSET, NSET=N_OBJ_207_STAFFA
2408, 2409, 2410, 2411, 2412
*ELSET, ELSET=E_OBJ_207_STAFFA
1652, 1653, 1654, 1655
*NSET, NSET=N_OBJ_208_STAFFA
2413, 2414, 2415, 2416, 2417
*ELSET, ELSET=E_OBJ_208_STAFFA
1656, 1657, 1658, 1659
*NSET, NSET=N_OBJ_209_STAFFA
2418, 2419, 2420, 2421, 2422
*ELSET, ELSET=E_OBJ_209_STAFFA
1660, 1661, 1662, 1663
*NSET, NSET=N_OBJ_210_STAFFA
2423, 2424, 2425, 2426, 2427
*ELSET, ELSET=E_OBJ_210_STAFFA
1664, 1665, 1666, 1667
*NSET, NSET=N_OBJ_211_STAFFA
2428, 2429, 2430, 2431, 2432
*ELSET, ELSET=E_OBJ_211_STAFFA
1668, 1669, 1670, 1671
*NSET, NSET=N_OBJ_212_STAFFA
2433, 2434, 2435, 2436, 2437
*ELSET, ELSET=E_OBJ_212_STAFFA
1672, 1673, 1674, 1675
*NSET, NSET=N_OBJ_213_STAFFA
2438, 2439, 2440, 2441, 2442
*ELSET, ELSET=E_OBJ_213_STAFFA
1676, 1677, 1678, 1679
*NSET, NSET=N_OBJ_214_STAFFA
2443, 2444, 2445, 2446, 2447
*ELSET, ELSET=E_OBJ_214_STAFFA
1680, 1681, 1682, 1683
*NSET, NSET=N_OBJ_215_STAFFA
2448, 2449, 2450, 2451, 2452
*ELSET, ELSET=E_OBJ_215_STAFFA
1684, 1685, 1686, 1687
*NSET, NSET=N_OBJ_216_STAFFA
2453, 2454, 2455, 2456, 2457
*ELSET, ELSET=E_OBJ_216_STAFFA
1688, 1689, 1690, 1691
*NSET, NSET=N_OBJ_217_STAFFA
2458, 2459, 2460, 2461, 2462
*ELSET, ELSET=E_OBJ_217_STAFFA
1692, 1693, 1694, 1695
*NSET, NSET=N_OBJ_218_STAFFA
2463, 2464, 2465, 2466, 2467
*ELSET, ELSET=E_OBJ_218_STAFFA
1696, 1697, 1698, 1699
*NSET, NSET=N_OBJ_219_STAFFA
2468, 2469, 2470, 2471, 2472
*ELSET, ELSET=E_OBJ_219_STAFFA
1700, 1701, 1702, 1703
*NSET, NSET=N_OBJ_220_STAFFA
2473, 2474, 2475, 2476, 2477
*ELSET, ELSET=E_OBJ_220_STAFFA
1704, 1705, 1706, 1707
*NSET, NSET=N_OBJ_221_STAFFA
2478, 2479, 2480, 2481, 2482
*ELSET, ELSET=E_OBJ_221_STAFFA
1708, 1709, 1710, 1711
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**
*MATERIAL, NAME=MAT_C25_30
*ELASTIC
3.1476e+10, 0.2000
*DENSITY
2.5000e+03
**
*MATERIAL, NAME=MAT_B450C
*ELASTIC
2.0000e+11, 0.3000
*DENSITY
7.8500e+03
**
*MATERIAL, NAME=MAT_DEFAULT
*ELASTIC
3.0000e+10, 0.2000
*SOLID SECTION, ELSET=E_OBJ_179_CARPENTERIA, MATERIAL=MAT_C25_30

*SOLID SECTION, ELSET=E_OBJ_180_CARPENTERIA, MATERIAL=MAT_C25_30

*SOLID SECTION, ELSET=E_OBJ_191_CARPENTERIA, MATERIAL=MAT_C25_30

*SOLID SECTION, ELSET=E_OBJ_222_BARRA, MATERIAL=MAT_B450C
0.0003141593
*SOLID SECTION, ELSET=E_OBJ_223_BARRA, MATERIAL=MAT_B450C
0.0003141593
*SOLID SECTION, ELSET=E_OBJ_224_BARRA, MATERIAL=MAT_B450C
0.0003141593
*SOLID SECTION, ELSET=E_OBJ_225_BARRA, MATERIAL=MAT_B450C
0.0003141593
*SOLID SECTION, ELSET=E_OBJ_226_BARRA, MATERIAL=MAT_B450C
0.0003141593
*SOLID SECTION, ELSET=E_OBJ_227_BARRA, MATERIAL=MAT_B450C
0.0003141593
*SOLID SECTION, ELSET=E_OBJ_228_BARRA, MATERIAL=MAT_B450C
0.0003141593
*SOLID SECTION, ELSET=E_OBJ_229_BARRA, MATERIAL=MAT_B450C
0.0003141593
*SOLID SECTION, ELSET=E_OBJ_230_BARRA, MATERIAL=MAT_B450C
0.0003801327
*SOLID SECTION, ELSET=E_OBJ_231_BARRA, MATERIAL=MAT_B450C
0.0003801327
*SOLID SECTION, ELSET=E_OBJ_232_BARRA, MATERIAL=MAT_B450C
0.0003801327
*SOLID SECTION, ELSET=E_OBJ_233_BARRA, MATERIAL=MAT_B450C
0.0003801327
*SOLID SECTION, ELSET=E_OBJ_234_BARRA, MATERIAL=MAT_B450C
0.0003801327
*SOLID SECTION, ELSET=E_OBJ_235_BARRA, MATERIAL=MAT_B450C
0.0003801327
*SOLID SECTION, ELSET=E_OBJ_236_BARRA, MATERIAL=MAT_B450C
0.0003801327
*SOLID SECTION, ELSET=E_OBJ_237_BARRA, MATERIAL=MAT_B450C
0.0003801327
*SOLID SECTION, ELSET=E_OBJ_238_BARRA, MATERIAL=MAT_B450C
0.0003801327
*SOLID SECTION, ELSET=E_OBJ_239_BARRA, MATERIAL=MAT_B450C
0.0003801327
*SOLID SECTION, ELSET=E_OBJ_240_BARRA, MATERIAL=MAT_B450C
0.0003801327
*SOLID SECTION, ELSET=E_OBJ_241_BARRA, MATERIAL=MAT_B450C
0.0003801327
*SOLID SECTION, ELSET=E_OBJ_242_BARRA, MATERIAL=MAT_B450C
0.0003801327
*SOLID SECTION, ELSET=E_OBJ_243_BARRA, MATERIAL=MAT_B450C
0.0003801327
*SOLID SECTION, ELSET=E_OBJ_244_BARRA, MATERIAL=MAT_B450C
0.0003801327
*SOLID SECTION, ELSET=E_OBJ_245_BARRA, MATERIAL=MAT_B450C
0.0003801327
*SOLID SECTION, ELSET=E_OBJ_246_BARRA, MATERIAL=MAT_B450C
0.0003801327
*SOLID SECTION, ELSET=E_OBJ_247_BARRA, MATERIAL=MAT_B450C
0.0003801327
*SOLID SECTION, ELSET=E_OBJ_248_BARRA, MATERIAL=MAT_B450C
0.0003801327
*SOLID SECTION, ELSET=E_OBJ_249_BARRA, MATERIAL=MAT_B450C
0.0003801327
*SOLID SECTION, ELSET=E_OBJ_192_STAFFA, MATERIAL=MAT_B450C
0.0000785398
*SOLID SECTION, ELSET=E_OBJ_193_STAFFA, MATERIAL=MAT_B450C
0.0000785398
*SOLID SECTION, ELSET=E_OBJ_194_STAFFA, MATERIAL=MAT_B450C
0.0000785398
*SOLID SECTION, ELSET=E_OBJ_195_STAFFA, MATERIAL=MAT_B450C
0.0000785398
*SOLID SECTION, ELSET=E_OBJ_196_STAFFA, MATERIAL=MAT_B450C
0.0000785398
*SOLID SECTION, ELSET=E_OBJ_197_STAFFA, MATERIAL=MAT_B450C
0.0000785398
*SOLID SECTION, ELSET=E_OBJ_198_STAFFA, MATERIAL=MAT_B450C
0.0000785398
*SOLID SECTION, ELSET=E_OBJ_199_STAFFA, MATERIAL=MAT_B450C
0.0000785398
*SOLID SECTION, ELSET=E_OBJ_200_STAFFA, MATERIAL=MAT_B450C
0.0000785398
*SOLID SECTION, ELSET=E_OBJ_201_STAFFA, MATERIAL=MAT_B450C
0.0000785398
*SOLID SECTION, ELSET=E_OBJ_202_STAFFA, MATERIAL=MAT_B450C
0.0000785398
*SOLID SECTION, ELSET=E_OBJ_203_STAFFA, MATERIAL=MAT_B450C
0.0000785398
*SOLID SECTION, ELSET=E_OBJ_204_STAFFA, MATERIAL=MAT_B450C
0.0000785398
*SOLID SECTION, ELSET=E_OBJ_205_STAFFA, MATERIAL=MAT_B450C
0.0000785398
*SOLID SECTION, ELSET=E_OBJ_206_STAFFA, MATERIAL=MAT_B450C
0.0000785398
*SOLID SECTION, ELSET=E_OBJ_207_STAFFA, MATERIAL=MAT_B450C
0.0000785398
*SOLID SECTION, ELSET=E_OBJ_208_STAFFA, MATERIAL=MAT_B450C
0.0000785398
*SOLID SECTION, ELSET=E_OBJ_209_STAFFA, MATERIAL=MAT_B450C
0.0000785398
*SOLID SECTION, ELSET=E_OBJ_210_STAFFA, MATERIAL=MAT_B450C
0.0000785398
*SOLID SECTION, ELSET=E_OBJ_211_STAFFA, MATERIAL=MAT_B450C
0.0000785398
*SOLID SECTION, ELSET=E_OBJ_212_STAFFA, MATERIAL=MAT_B450C
0.0000785398
*SOLID SECTION, ELSET=E_OBJ_213_STAFFA, MATERIAL=MAT_B450C
0.0000785398
*SOLID SECTION, ELSET=E_OBJ_214_STAFFA, MATERIAL=MAT_B450C
0.0000785398
*SOLID SECTION, ELSET=E_OBJ_215_STAFFA, MATERIAL=MAT_B450C
0.0000785398
*SOLID SECTION, ELSET=E_OBJ_216_STAFFA, MATERIAL=MAT_B450C
0.0000785398
*SOLID SECTION, ELSET=E_OBJ_217_STAFFA, MATERIAL=MAT_B450C
0.0000785398
*SOLID SECTION, ELSET=E_OBJ_218_STAFFA, MATERIAL=MAT_B450C
0.0000785398
*SOLID SECTION, ELSET=E_OBJ_219_STAFFA, MATERIAL=MAT_B450C
0.0000785398
*SOLID SECTION, ELSET=E_OBJ_220_STAFFA, MATERIAL=MAT_B450C
0.0000785398
*SOLID SECTION, ELSET=E_OBJ_221_STAFFA, MATERIAL=MAT_B450C
0.0000785398
**
** TIE CONSTRAINTS - Superficie-Superficie tra carpenteria
*SURFACE, NAME=SURF_TIE_M_179_0, TYPE=ELEMENT
26, S2
26, S3
26, S6
27, S2
27, S3
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50, S5
*SURFACE, NAME=SURF_TIE_S_180_0, TYPE=ELEMENT
51, S1
51, S3
51, S6
52, S1
52, S3
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75, S5
*TIE, NAME=TIE_CARP_0, POSITION TOLERANCE=0.001
SURF_TIE_S_180_0, SURF_TIE_M_179_0
*SURFACE, NAME=SURF_TIE_M_180_1, TYPE=ELEMENT
101, S2
101, S3
101, S6
102, S2
102, S3
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125, S5
*SURFACE, NAME=SURF_TIE_S_191_1, TYPE=ELEMENT
126, S1
126, S3
126, S6
127, S1
127, S3
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150, S5
*TIE, NAME=TIE_CARP_1, POSITION TOLERANCE=0.001
SURF_TIE_S_191_1, SURF_TIE_M_180_1
**
** ============================================
** STEP DI ANALISI
** ============================================
*STEP
*STATIC
**
** VINCOLI
*BOUNDARY
1, 1, 1, 0.00000000e+00
1, 2, 2, 0.00000000e+00
1, 3, 3, 0.00000000e+00
2, 1, 1, 0.00000000e+00
2, 2, 2, 0.00000000e+00
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36, 3, 3, 0.00000000e+00
**
** CARICHI (kN -> N)
*CLOAD
2053, 3, -6.81818182e+05
2054, 3, -6.81818182e+05
2055, 3, -6.81818182e+05
2056, 3, -6.81818182e+05
2057, 3, -6.81818182e+05
2058, 3, -6.81818182e+05
2059, 3, -6.81818182e+05
2060, 3, -6.81818182e+05
2061, 3, -6.81818182e+05
2062, 3, -6.81818182e+05
2063, 3, -6.81818182e+05
2064, 3, -6.81818182e+05
2065, 3, -6.81818182e+05
2066, 3, -6.81818182e+05
2067, 3, -6.81818182e+05
2068, 3, -6.81818182e+05
2069, 3, -6.81818182e+05
2070, 3, -6.81818182e+05
2071, 3, -6.81818182e+05
2072, 3, -6.81818182e+05
2073, 3, -6.81818182e+05
2074, 3, -6.81818182e+05
2075, 3, -6.81818182e+05
2076, 3, -6.81818182e+05
2077, 3, -6.81818182e+05
2078, 3, -6.81818182e+05
2079, 3, -6.81818182e+05
2080, 3, -6.81818182e+05
2081, 3, -6.81818182e+05
2082, 3, -6.81818182e+05
2083, 3, -6.81818182e+05
2084, 3, -6.81818182e+05
2085, 3, -6.81818182e+05
2086, 3, -6.81818182e+05
2087, 3, -6.81818182e+05
2088, 3, -6.81818182e+05
2101, 3, -6.81818182e+05
2114, 3, -6.81818182e+05
2127, 3, -6.81818182e+05
2140, 3, -6.81818182e+05
2153, 3, -6.81818182e+05
2166, 3, -6.81818182e+05
2179, 3, -6.81818182e+05
2192, 3, -6.81818182e+05
**
*NODE FILE
U
*EL FILE
S, E
*END STEP
