** CalculiX input file generato da SectionCHECK
** Elemento: Solaio 4.00×1.20
** Nodi: 18870  Elementi: 15068
**
*NODE, NSET=NALL
1, 0.00000000e+00, 0.00000000e+00, 0.00000000e+00
2, 4.00000000e-02, 0.00000000e+00, 0.00000000e+00
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*ELEMENT, TYPE=C3D8I, ELSET=EALL_HEX
1, 1, 2, 103, 102, 3132, 3133, 3234, 3233
2, 2, 3, 104, 103, 3133, 3134, 3235, 3234
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*ELEMENT, TYPE=B31, ELSET=EALL_BEAM
15001, 18787, 18788
15002, 18788, 18789
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*NSET, NSET=N_OBJ_90_CARPENTERIA
1, 2, 3, 4, 5, 6
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*ELSET, ELSET=E_OBJ_90_CARPENTERIA
1, 2, 3, 4, 5, 6
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*NSET, NSET=N_OBJ_91_BARRA
18787, 18788, 18789
*ELSET, ELSET=E_OBJ_91_BARRA
15001, 15002
*NSET, NSET=N_OBJ_92_BARRA
18790, 18791, 18792
*ELSET, ELSET=E_OBJ_92_BARRA
15003, 15004
*NSET, NSET=N_OBJ_93_BARRA
18793, 18794, 18795
*ELSET, ELSET=E_OBJ_93_BARRA
15005, 15006
*NSET, NSET=N_OBJ_94_BARRA
18796, 18797, 18798
*ELSET, ELSET=E_OBJ_94_BARRA
15007, 15008
*NSET, NSET=N_OBJ_95_BARRA
18799, 18800, 18801
*ELSET, ELSET=E_OBJ_95_BARRA
15009, 15010
*NSET, NSET=N_OBJ_96_BARRA
18802, 18803, 18804
*ELSET, ELSET=E_OBJ_96_BARRA
15011, 15012
*NSET, NSET=N_OBJ_97_BARRA
18805, 18806, 18807
*ELSET, ELSET=E_OBJ_97_BARRA
15013, 15014
*NSET, NSET=N_OBJ_98_BARRA
18808, 18809, 18810
*ELSET, ELSET=E_OBJ_98_BARRA
15015, 15016
*NSET, NSET=N_OBJ_99_BARRA
18811, 18812, 18813
*ELSET, ELSET=E_OBJ_99_BARRA
15017, 15018
*NSET, NSET=N_OBJ_100_BARRA
18814, 18815, 18816
*ELSET, ELSET=E_OBJ_100_BARRA
15019, 15020
*NSET, NSET=N_OBJ_101_BARRA
18817, 18818, 18819
*ELSET, ELSET=E_OBJ_101_BARRA
15021, 15022
*NSET, NSET=N_OBJ_102_BARRA
18820, 18821, 18822
*ELSET, ELSET=E_OBJ_102_BARRA
15023, 15024
*NSET, NSET=N_OBJ_103_BARRA
18823, 18824, 18825
*ELSET, ELSET=E_OBJ_103_BARRA
15025, 15026
*NSET, NSET=N_OBJ_104_BARRA
18826, 18827, 18828
*ELSET, ELSET=E_OBJ_104_BARRA
15027, 15028
*NSET, NSET=N_OBJ_105_BARRA
18829, 18830, 18831
*ELSET, ELSET=E_OBJ_105_BARRA
15029, 15030
*NSET, NSET=N_OBJ_106_BARRA
18832, 18833, 18834
*ELSET, ELSET=E_OBJ_106_BARRA
15031, 15032
*NSET, NSET=N_OBJ_107_STAFFA
18835, 18836, 18837, 18838, 18839, 18840, 18841, 18842, 18843
*ELSET, ELSET=E_OBJ_107_STAFFA
15033, 15034, 15035, 15036, 15037, 15038, 15039, 15040, 15041
*NSET, NSET=N_OBJ_108_STAFFA
18844, 18845, 18846, 18847, 18848, 18849, 18850, 18851, 18852
*ELSET, ELSET=E_OBJ_108_STAFFA
15042, 15043, 15044, 15045, 15046, 15047, 15048, 15049, 15050
*NSET, NSET=N_OBJ_109_STAFFA
18853, 18854, 18855, 18856, 18857, 18858, 18859, 18860, 18861
*ELSET, ELSET=E_OBJ_109_STAFFA
15051, 15052, 15053, 15054, 15055, 15056, 15057, 15058, 15059
*NSET, NSET=N_OBJ_110_STAFFA
18862, 18863, 18864, 18865, 18866, 18867, 18868, 18869, 18870
*ELSET, ELSET=E_OBJ_110_STAFFA
15060, 15061, 15062, 15063, 15064, 15065, 15066, 15067, 15068
**
*MATERIAL, NAME=MAT_C25/30
*ELASTIC
2.1000e+05, 0.2000
*DENSITY
2.5000e+03
**
*MATERIAL, NAME=MAT_B450C
*ELASTIC
2.1000e+05, 0.3000
*DENSITY
7.8500e+03
**
*MATERIAL, NAME=MAT_DEFAULT
*ELASTIC
3.0000e+04, 0.2000
*SOLID SECTION, ELSET=E_OBJ_90_CARPENTERIA, MATERIAL=MAT_C25/30

*BEAM SECTION, ELSET=E_OBJ_91_BARRA, MATERIAL=MAT_B450C, SECTION=CIRC
0.008
0.0, 0.0, 1.0
*BEAM SECTION, ELSET=E_OBJ_92_BARRA, MATERIAL=MAT_B450C, SECTION=CIRC
0.008
0.0, 0.0, 1.0
*BEAM SECTION, ELSET=E_OBJ_93_BARRA, MATERIAL=MAT_B450C, SECTION=CIRC
0.008
0.0, 0.0, 1.0
*BEAM SECTION, ELSET=E_OBJ_94_BARRA, MATERIAL=MAT_B450C, SECTION=CIRC
0.008
0.0, 0.0, 1.0
*BEAM SECTION, ELSET=E_OBJ_95_BARRA, MATERIAL=MAT_B450C, SECTION=CIRC
0.008
0.0, 0.0, 1.0
*BEAM SECTION, ELSET=E_OBJ_96_BARRA, MATERIAL=MAT_B450C, SECTION=CIRC
0.008
0.0, 0.0, 1.0
*BEAM SECTION, ELSET=E_OBJ_97_BARRA, MATERIAL=MAT_B450C, SECTION=CIRC
0.008
0.0, 0.0, 1.0
*BEAM SECTION, ELSET=E_OBJ_98_BARRA, MATERIAL=MAT_B450C, SECTION=CIRC
0.008
0.0, 0.0, 1.0
*BEAM SECTION, ELSET=E_OBJ_99_BARRA, MATERIAL=MAT_B450C, SECTION=CIRC
0.008
0.0, 0.0, 1.0
*BEAM SECTION, ELSET=E_OBJ_100_BARRA, MATERIAL=MAT_B450C, SECTION=CIRC
0.008
0.0, 0.0, 1.0
*BEAM SECTION, ELSET=E_OBJ_101_BARRA, MATERIAL=MAT_B450C, SECTION=CIRC
0.008
0.0, 0.0, 1.0
*BEAM SECTION, ELSET=E_OBJ_102_BARRA, MATERIAL=MAT_B450C, SECTION=CIRC
0.008
0.0, 0.0, 1.0
*BEAM SECTION, ELSET=E_OBJ_103_BARRA, MATERIAL=MAT_B450C, SECTION=CIRC
0.008
0.0, 0.0, 1.0
*BEAM SECTION, ELSET=E_OBJ_104_BARRA, MATERIAL=MAT_B450C, SECTION=CIRC
0.008
0.0, 0.0, 1.0
*BEAM SECTION, ELSET=E_OBJ_105_BARRA, MATERIAL=MAT_B450C, SECTION=CIRC
0.008
0.0, 0.0, 1.0
*BEAM SECTION, ELSET=E_OBJ_106_BARRA, MATERIAL=MAT_B450C, SECTION=CIRC
0.008
0.0, 0.0, 1.0
*BEAM SECTION, ELSET=E_OBJ_107_STAFFA, MATERIAL=MAT_B450C, SECTION=CIRC
0.008
0.0, 0.0, 1.0
*BEAM SECTION, ELSET=E_OBJ_108_STAFFA, MATERIAL=MAT_B450C, SECTION=CIRC
0.008
0.0, 0.0, 1.0
*BEAM SECTION, ELSET=E_OBJ_109_STAFFA, MATERIAL=MAT_B450C, SECTION=CIRC
0.008
0.0, 0.0, 1.0
*BEAM SECTION, ELSET=E_OBJ_110_STAFFA, MATERIAL=MAT_B450C, SECTION=CIRC
0.008
0.0, 0.0, 1.0
**
** ============================================
** STEP DI ANALISI
** ============================================
*STEP
*STATIC
**
*NODE FILE
U
*EL FILE
S, E
*END STEP
