** CalculiX input file generato da SectionCHECK
** Elemento: Trave.002
** Nodi: 6721  Elementi: 5520
**
*NODE, NSET=NALL
1, 0.00000000e+00, -1.00000000e+00, 0.00000000e+00
2, 1.08695652e-01, -9.78260870e-01, 0.00000000e+00
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*ELEMENT, TYPE=C3D8I, ELSET=EALL_HEX
1, 1, 2, 49, 48, 612, 613, 660, 659
2, 2, 3, 50, 49, 613, 614, 661, 660
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*NSET, NSET=N_OBJ_115_CARPENTERIA
1, 2, 3, 4, 5, 6
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*ELSET, ELSET=E_OBJ_115_CARPENTERIA
1, 2, 3, 4, 5, 6
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**
*MATERIAL, NAME=MAT_C16/20
*ELASTIC
2.1000e+05, 0.2000
*DENSITY
2.5000e+03
**
*MATERIAL, NAME=MAT_DEFAULT
*ELASTIC
3.0000e+04, 0.2000
*SOLID SECTION, ELSET=E_OBJ_115_CARPENTERIA, MATERIAL=MAT_C16/20

**
** ============================================
** STEP DI ANALISI
** ============================================
*STEP
*STATIC
**
*NODE FILE
U
*EL FILE
S, E
*END STEP
